units metal
dimension 3
boundary p p p
atom_style atomic
atom_modify map array

# Number of box replicates
variable nr equal 9

# File names
variable outdata0 string "CoFeNi_ref.data"
variable outdata1 string "CoFeNi_minimized.data"
variable outdata2 string "CoFeNi_mcmd.data"
variable ffname string "../../potential-files/eam/CuAgAuNiPdPtAlPbFeMoTaWMgCoTiZr_Zhou04.eam.alloy"

# Fraction of each atomic component
variable fCo equal 0.33333
variable fFe equal 0.33333
variable fNi equal 0.33334

# Reasonable lattice for CoFeNi
variable fccCoFeNi equal 3.58

variable Lx equal 30*${fccCoFeNi}
variable Ly equal 30*${fccCoFeNi}
variable Lz equal 15*${fccCoFeNi}
variable Ls equal 5*${fccCoFeNi}

region system block -${Lx} ${Lx} -${Ly} ${Ly} -${Lz} ${Lz}
region slab block -${Lx} ${Lx} -${Ly} ${Ly} -${Ls} ${Ls}
create_box 3 system

lattice fcc ${fccCoFeNi} orient x 1 0 0 orient y 0 1 0 orient z 0 0 1
# lattice fcc ${fccCoFeNi} orient x 0 0 1 orient y 1 1 0 orient z -1 1 0
# lattice fcc ${fccCoFeNi} orient x 1 -1 0 orient y 1 1 -2 orient z 1 1 1

create_atoms 1 region slab

# ???
lattice none 1.0

# Labelmap: atom 1 W, atom 2 Mo
set type 1 type/fraction 2 $(v_fNi+v_fFe) 1234567
set type 2 type/fraction 3 $((v_fFe)/(v_fNi+v_fFe)) 1234566

pair_style eam/alloy
pair_coeff * * ${ffname} Co Fe Ni
neighbor 2.0 bin
neigh_modify delay 0 every 1 check yes

write_data ${outdata0}

variable pea_avg equal "pe/atoms"
thermo 10
thermo_style custom step v_pea_avg pe temp lx ly lz press

## THIS NEEDS TO BE CHANGED! ###

# Energy minimization
fix myMin all box/relax x 0.0 y 0.0 vmax 0.001
min_style cg
minimize 1e-4 1e-5 1000 10000
unfix myMin
reset_timestep 0

write_data ${outdata1}

dump myDump all custom 125 CoFeNi-slab.dump id type x y z xu yu zu vx vy vz
dump_modify myDump element Co Fe Ni

velocity all create 300.0 4928459 rot yes dist gaussian

# Fix NPT
timestep 0.001
fix myMD all npt temp 300.0 300.0 1.0 x 0.0 0.0 5.0 y 0.0 0.0 5.0

# Fix atom swaps
# (for some reason it is possible to swap only two atom types at the time
# unless the simulation is performed in the grand-canonical ensemble?)
fix myMC1 all atom/swap 250 333 1234 300.0 ke no types 1 2
fix myMC2 all atom/swap 250 333 2345 300.0 ke no types 2 3
fix myMC3 all atom/swap 250 333 3456 300.0 ke no types 1 3

run 500000

write_data ${outdata2}
